<?xml version="1.0" ?>
<Node dt="0.01" gravity="0 -9.81 0" name="root">
    <RequiredPlugin name="SofaOpenglVisual"/>
    <BruteForceDetection />
    <DefaultContactManager />
    <DefaultPipeline />
    <MinProximityIntersection alarmDistance="1" contactDistance="0.5"/>
    <Node>
        <EulerImplicitSolver name="cg odesolver" printLog="false"  rayleighStiffness="0.1" rayleighMass="0.1" />
        <CGLinearSolver iterations="100" name="linear solver" threshold="1e-20" tolerance="1e-20" />
        <MechanicalObject template="Rigid3d" name="sta" position="0 0 0  0 0 0 1" />
        <UniformMass template="Rigid3d" name="mass" vertexMass="0.1 0.1 [1 0 0,0 1 0,0 0 1]" />

        <Node name="articulation">
            <MechanicalObject name="Articulations" template="Vec1d" position="0 0 0 0" />
            <Node>
                <MechanicalObject template="Rigid3d" name="DOFs" position="0 0 0  0 0 0 1  1 0 0  0 0 0 1  3 0 0  0 0 0 1  5 0 0  0 0 0 1  7 0 0  0 0 0 1" />
                <BeamFEMForceField name="FEM" radius="0.1" youngModulus="1e8" poissonRatio="0.45"/>
                <MeshTopology name="lines" lines="0 1 1 2 2 3 3 4 " />
                <UniformMass template="Rigid3d" name="mass" vertexMass="0.1 0.1 [1 0 0,0 1 0,0 0 1]" />
                <ArticulatedSystemMapping input2="@../sta" input1="@../Articulations" output="@DOFs" />

                <Node name="Visu">
                    <OglModel name="Visual" position="-1 -0.5 -0.5 -1 0.5 -0.5 -1 0.5 0.5 -1 -0.5 0.5 1 -0.5 -0.5 1 0.5 -0.5 1 0.5 0.5 1 -0.5 0.5 -1 -0.5 -0.5 -1 0.5 -0.5 -1 0.5 0.5 -1 -0.5 0.5 1 -0.5 -0.5 1 0.5 -0.5 1 0.5 0.5 1 -0.5 0.5 -1 -0.5 -0.5 -1 0.5 -0.5 -1 0.5 0.5 -1 -0.5 0.5 1 -0.5 -0.5 1 0.5 -0.5 1 0.5 0.5 1 -0.5 0.5 -1 -0.5 -0.5 -1 0.5 -0.5 -1 0.5 0.5 -1 -0.5 0.5 1 -0.5 -0.5 1 0.5 -0.5 1 0.5 0.5 1 -0.5 0.5" triangles="3 1 0 3 2 1 3 6 2 3 7 6 7 5 6 7 4 5 4 1 5 4 0 1 5 1 2 2 6 5 4 7 3 4 3 0 11 9 8 11 10 9 11 14 10 11 15 14 15 13 14 15 12 13 12 9 13 12 8 9 13 9 10 10 14 13 12 15 11 12 11 8 19 17 16 19 18 17 19 22 18 19 23 22 23 21 22 23 20 21 20 17 21 20 16 17 21 17 18 18 22 21 20 23 19 20 19 16 27 25 24 27 26 25 27 30 26 27 31 30 31 29 30 31 28 29 28 25 29 28 24 25 29 25 26 26 30 29 28 31 27 28 27 24" />
                    <RigidMapping template="Rigid3d,ExtVec3f" rigidIndexPerPoint="1 1 1 1 1 1 1 1 2 2 2 2 2 2 2 2 3 3 3 3 3 3 3 3 4 4 4 4 4 4 4 4" input="@.." output="@Visual" />
                </Node>
            </Node>
            <ArticulatedHierarchyContainer />
            <Node name="articulationCenters">
                <Node name="articulationCenter1">
                    <ArticulationCenter parentIndex="0" childIndex="1" posOnParent="0 0 0" posOnChild="-1 0 0" articulationProcess="2" />
                    <Node name="articulations">
                        <Articulation translation="0" rotation="1" rotationAxis="0 0 1" articulationIndex="0" />
                    </Node>
                </Node>
                <Node name="articulationCenter2">
                    <ArticulationCenter parentIndex="1" childIndex="2" posOnParent="1 0 0" posOnChild="-1 0 0" articulationProcess="2" />
                    <Node name="articulations">
                        <Articulation translation="0" rotation="1" rotationAxis="0 0 1" articulationIndex="1" />
                    </Node>
                </Node>
                <Node name="articulationCenter3">
                    <ArticulationCenter parentIndex="2" childIndex="3" posOnParent="1 0 0" posOnChild="-1 0 0" articulationProcess="0" />
                    <Node name="articulations">
                        <Articulation translation="0" rotation="1" rotationAxis="0 1 0" articulationIndex="2" />
                    </Node>
                </Node>
                <Node name="articulationCenter4">
                    <ArticulationCenter parentIndex="3" childIndex="4" posOnParent="1 0 0" posOnChild="-1 0 0" articulationProcess="1" />
                    <Node name="articulations">
                        <Articulation translation="0" rotation="1" rotationAxis="0 0 1" articulationIndex="3" />
                    </Node>
                </Node>
            </Node>
        </Node>
         </Node>
</Node>
