import Sofa
from splib.numerics import RigidDof
from splib.animation import animate
from splib.constants import Key
from tutorial import *
from tripod import Tripod


def setupanimation(actuators, step, angularstep, factor):
    """This function is called repeatidely in an animation.
       It moves the actuators by translating & rotating them according to the factor
       value.
    """
    for actuator in actuators:
            actuator.servomotor.Position.dofs.rotation = [0., 0., 0.]
            actuator.servomotor.Position.dofs.translation = [0., 0., 0.]
            rigid = RigidDof(actuator.servomotor.Position.dofs)
            actuator.servomotor.Position.dofs.init()
            rigid.translate(rigid.forward * step * factor)
            actuator.servomotor.angle = angularstep * factor


class TripodController(Sofa.PythonScriptController):
    """This controller has two roles:
       - if the user presses up/left/right/down/plus/minus, the servomotor angle
         is changed.
       - if the user presses A, an animation is started to move the servomotor to the initial position
         of the real robot.
    """

    def __init__(self, node, actuators):
        self.stepsize = 0.1
        self.actuators = actuators

    def onKeyPressed(self, key):
        self.initTripod(key)
        self.animateTripod(key)

    def initTripod(self, key):
        if key == Key.A:
            animate(setupanimation, {"actuators": self.actuators, "step": 35.0, "angularstep": -1.4965}, duration=0.2)

    def animateTripod(self, key):
        if key == Key.uparrow:
            self.actuators[0].servomotor.angle += self.stepsize
        elif key == Key.downarrow:
            self.actuators[0].servomotor.angle -= self.stepsize

        '''
        if key == Key.leftarrow:
            self.actuators[1].servomotor.angle += self.stepsize
        elif key == Key.rightarrow:
            self.actuators[1].servomotor.angle -= self.stepsize

        if key == Key.plus:
            self.actuators[2].servomotor.angle += self.stepsize
        elif key == Key.minus:
            self.actuators[2].servomotor.angle -= self.stepsize
        '''

def createScene(rootNode):
    scene = Scene(rootNode)
    rootNode.dt = 0.001


    tripod = Tripod(scene.Modelling)

    TripodController(scene, tripod.actuatedarms)

    scene.Simulation.addChild(tripod.ActuatedArm0)
    #scene.Simulation.addChild(tripod.ActuatedArm1)
    #scene.Simulation.addChild(tripod.ActuatedArm2)
